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/batch
! ANSYS input file written by Workbench version 2021 R1
! File used for geometry attach: C:\Users\xie\AppData\Local\Temp\WB_xie_16292_2\wbnew_files\dp0\Geom\DM\Geom.scdoc
/title,wbnew--Static Structural (B5)
/com,--- Data in consistent NMM units. See Solving Units in the help system for more information.
/units,MPA
/prep7
! Turn off shape checking because checks already performed inside WB mesher.
! See help system for more information.
SHPP,OFF,,NOWARN
etcon,set             ! allow ANSYS to choose best KEYOP's for 180x elements, resets any applicable keyopt to MAPDL defaults
/com,*********** Nodes for the whole assembly ***********
nblock,3,,3022
(1i9,3e20.9e3)
        1     6.429183358E-15     1.050000000E+02     0.000000000E+00
        2     6.678143281E-15     1.000000000E+02     0.000000000E+00
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-1
/com,*********** Elements for Body 1 "Geom\Surface" ***********
et,1,183
keyo,1,3,3
eblock,19,solid,,805
(19i9)
        1        1        1        1        0        0        0        0        8        0        1      805        5      809        3      983      984      978      977
        1        1        1        1        0        0        0        0        8        0        2      806      165        5      805     1464      982      983     2584
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-1
/com,*********** Send User Defined Coordinate System(s) ***********
csys,0
toffst,273.15,  ! Temperature offset from absolute zero
/com,*********** Set Reference Temperature ***********
tref,22.
/com,*********** Send Materials ***********
Temperature = 'TEMP' ! Temperature
MP,DENS,1,7.85e-09,	! tonne mm^-3
MP,ALPX,1,1.2e-05,	! C^-1
MP,C,1,434000000,	! mm^2 s^-2 C^-1
MP,KXX,1,60.5,	! tonne mm s^-3 C^-1
MP,RSVX,1,0.00017,	! ohm mm
MP,EX,1,200000,	! tonne s^-2 mm^-1
MP,NUXY,1,0.3,
MP,MURX,1,10000,

/com,*********** Send Sheet Properties ***********
r,1,1000.

!************************* Model Summary ********************
!Geom\Surface,	Structural Steel,	matid,	1
!************************* End Model Summary ********************
/com,********* Frictionless Supports X *********
CMBLOCK,_FRICSUX,NODE,       11
(8i10)
         1         2       969       970       971       972       974       976
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cmsel,s,_FRICSUX
d,all,ux,0
nsel,all
/com,********* Frictionless Supports Y *********
CMBLOCK,_FRICSUY,NODE,       11
(8i10)
         3         4       805       806       807       808       977       980
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cmsel,s,_FRICSUY
d,all,uy,0
nsel,all
/com,*********** Define Pressure Using Surface Effect Elements ***********
et,2,153
keyop,2,3,10        ! get plane stress option and thickness from underlying element
eblock,10,,,161
(15i9)
      806        2        2        2        0        3      809      978
      807        2        2        2        0      809      810     2587
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-1
esel,s,type,,2
keyop,2,7,0                ! Use deformed area for application of load
esel,all

*DIM,_loadvari30,TABLE,2,1,1,TIME,
! Time values
_loadvari30(1,0,1) = 0.
_loadvari30(2,0,1) = 1.
! Load values
_loadvari30(1,1,1) = 0.
_loadvari30(2,1,1) = 2.

esel,all
fini
/com,****************************************************************************
/com,*************************    SOLUTION       ********************************
/com,****************************************************************************
/solu
antype,0                   ! static analysis
_thickRatio=  0     ! Ratio of thick parts in the model
eqsl,sparse,,,,,1
cntr,print,1               ! print out contact info and also make no initial contact an error
dmpoption,emat,no             ! Don't combine emat file for DANSYS
dmpoption,esav,no             ! Don't combine esav file for DANSYS
nldiag,cont,iter           ! print out contact info each equilibrium iteration
rescontrol,,none                 ! Do not keep any restart files
/com,****************************************************
/com,******************* SOLVE FOR LS 1 OF 1 ****************
esel,s,type,,2
nsle
sf,all,pres,%_loadvari30%
nsel,all
esel,all
esel,all
nsub,1,1,1
time,1.
outres,erase
outres,all,none
outres,nsol,all,
outres,rsol,all
outres,eangl,all
outres,etmp,all
outres,veng,all
outres,strs,all,
outres,epel,all,
outres,eppl,all,
outres,cont,all,
! *********** WB SOLVE COMMAND ***********
! check interactive state
*get,ANSINTER_,active,,int
*if,ANSINTER_,ne,0,then
/eof
*endif
solve
/com *************** Write FE CONNECTORS *********
CEWRITE,file,ce,,INTE
/com,****************************************************
/com,*************** FINISHED SOLVE FOR LS 1 *************
/post1
fini
