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/batch
! ANSYS input file written by Workbench version 2021 R1
! File used for geometry attach: C:\Users\xie\AppData\Local\Temp\WB_xie_10276_2\wbnew_files\dp0\SYS\DM\SYS.scdoc
/title,wbnew--Static Structural (A5)
/com,--- Data in consistent NMM units. See Solving Units in the help system for more information.
/units,MPA
/prep7
! Turn off shape checking because checks already performed inside WB mesher.
! See help system for more information.
SHPP,OFF,,NOWARN
etcon,set             ! allow ANSYS to choose best KEYOP's for 180x elements, resets any applicable keyopt to MAPDL defaults
/com,*********** Nodes for the whole assembly ***********
nblock,3,,90
(1i9,3e20.9e3)
        1     0.000000000E+00     0.000000000E+00     0.000000000E+00
        2     1.000000000E+02     1.732050808E+02     0.000000000E+00
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-1
/com,*********** Elements for Body 1 "Beam (Circle)" ***********
et,1,188
keyo,1,3,2
eblock,19,solid,,40
(19i9)
        1        1        1        1        0        0        0        0        3        0        1        1        3       42
        1        1        1        1        0        0        0        0        3        0        2        3        4       43
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-1
/com,*********** Send User Defined Coordinate System(s) ***********
csys,0
toffst,273.15,  ! Temperature offset from absolute zero
/com,*********** Set Reference Temperature ***********
tref,22.
/com,*********** Send Materials ***********
MP,EX,1,210000,	! tonne s^-2 mm^-1
MP,NUXY,1,0.3,

/com,*********** Send Beam Properties ***********
SECTYPE,1,BEAM,CSOL
SECDATA,12.5
secoffset,cent

!************************* Model Summary ********************
!Beam (Circle),	Steel,	matid,	1
!************************* End Model Summary ********************
/com,*********** Simple Supports ***********
CMBLOCK,_SIMPLSU,NODE,        2
(8i10)
         2        22
cmsel,s,_SIMPLSU
d,all,ux,0
d,all,uy,0
d,all,uz,0
nsel,all
/com,********** Rotational Supports X **********
CMBLOCK,_ROTSUX ,NODE,        2
(8i10)
         2        22
cmsel,s,_ROTSUX
d,all,rotx,0
nsel,all
/com,********** Rotational Supports Y **********
CMBLOCK,_ROTSUY ,NODE,        2
(8i10)
         2        22
cmsel,s,_ROTSUY
d,all,roty,0
nsel,all
/com,*********** Create Beam End Releases ***********
! Beam end release with connection behavior as coupled
cp,next,ux,1,82
cp,next,uy,1,82
cp,next,uz,1,82
cp,next,rotx,1,82
cp,next,roty,1,82
cp,next,rotz,1,82
/com,*********** Define Vertex Force Using Follower Elements ***********
et,2,201
keyo,2,1,1           ! Keep the direction constant
keyo,2,2,1           ! Apply Forces only, not moment
mat,2
real,2
type,2
en,42,1
en,43,82
r,2
rmod,2,1,1.0,              ! FX
mat,3
real,3
type,2
en,44,1
en,45,82
r,3
rmod,3,2,1.0,              ! FY
mat,4
real,4
type,2
en,46,1
en,47,82
r,4
rmod,4,3,1.0,              ! FZ
fini
/com,****************************************************************************
/com,*************************    SOLUTION       ********************************
/com,****************************************************************************
/solu
antype,0                   ! static analysis
_thickRatio=  0     ! Ratio of thick parts in the model
eqsl,sparse,,,,,1
cntr,print,1               ! print out contact info and also make no initial contact an error
dmpoption,emat,no             ! Don't combine emat file for DANSYS
dmpoption,esav,no             ! Don't combine esav file for DANSYS
nldiag,cont,iter           ! print out contact info each equilibrium iteration
rescontrol,,none                 ! Do not keep any restart files
/com,****************************************************
/com,******************* SOLVE FOR LS 1 OF 1 ****************
esel,s,real,,2
sfe,all,1,pres,1,0.
esel,s,real,,3
sfe,all,1,pres,1,-50000.
esel,s,real,,4
sfe,all,1,pres,1,0.
esel,all
nsub,1,1,1
time,1.
outres,erase
outres,all,none
outres,nsol,all,
outres,rsol,all
outres,eangl,all
outres,etmp,all
outres,veng,all
outres,strs,all,
outres,epel,all,
outres,eppl,all,
outres,cont,all,
esel,s,type,,1
cm,_elmisc,elem
esel,all
outres,misc,all,_elmisc
! *********** WB SOLVE COMMAND ***********
! check interactive state
*get,ANSINTER_,active,,int
*if,ANSINTER_,ne,0,then
/eof
*endif
solve
/com *************** Write FE CONNECTORS *********
CEWRITE,file,ce,,INTE
/com,****************************************************
/com,*************** FINISHED SOLVE FOR LS 1 *************
/post1
fini
